# DESALINATION LAMMPS INPUT SCRIPT 21 JAN 2016

# For Graphene Slit Membrane in Frozen Configuration. Results # are published at E.Y.M. Ang, T.Y. Ng, J. Yeo, Z. Liu, K.R.  # Geethalakshmi, Free-standing graphene slit membrane for      # enhanced desalination, Carbon, 110, 350-355 (2016) DOI:     # http://dx.doi.org/10.1016/j.carbon.2016.09.043


#SETUP

units		real
atom_style      full
boundary	p p p

bond_style	harmonic
angle_style	harmonic
read_data	data1.system

#REGIONS AND GROUP DEFINITIONS
#Define piston and membrane regions
variable start_pos_R equal xhi-30+2.5
variable start_pos_M equal 3+25.560+3
variable end_pos_M equal 3+25.560+3+3
region pistonL block  0  2  0 EDGE 0 EDGE
region pistonR block ${start_pos_R} EDGE 0 EDGE 0 EDGE
region membrane block ${start_pos_M} ${end_pos_M}  0 EDGE 0 EDGE

#Define feed and permeate regions
region feed block -20 ${start_pos_M} 0 EDGE 0 EDGE units box
region permeate block ${end_pos_M} EDGE 0 EDGE 0 EDGE units box

#Define group
group p_carbon type 6
group m_carbon type 5
group carbon type 5 6
group water  type 1 2
group salt   type 3 4
group watermols type 1
group Na type 3
group Cl type 4
group saltandwater type 1 2 3 4
group pistonL id 2698:2937
group pistonR id 3138:3377
group pistons union pistonL pistonR
group membrane id 2938:3137
group output union saltandwater membrane

#define helpful variables
variable xarea equal (yhi*zhi)
variable atmP  equal 1.47075E-05
variable atmF  equal (${atmP}*${xarea})

#POTENTIAL MODEL SETTINGS

#Settings for airebo
pair_style hybrid lj/cut/tip4p/long 1 2 1 1 0.1250 8.5 8.5 lj/cut/coul/long 8.5 8.5 airebo 3.0

pair_modify tail yes

pair_coeff  *  * lj/cut/tip4p/long 0.  0.
pair_coeff  *  * lj/cut/coul/long  0.  0.
pair_coeff * * airebo CH.airebo_real NULL NULL NULL NULL C C
pair_coeff	1  1 lj/cut/tip4p/long 0.16275  3.16435
pair_coeff	2  2 lj/cut/tip4p/long 0.  0.
pair_coeff	1  2 lj/cut/tip4p/long 0.  0.
pair_coeff  3  3 lj/cut/coul/long  0.1684 2.452
pair_coeff  1  3 lj/cut/coul/long  0.1656 2.808175
pair_coeff  2  3 lj/cut/coul/long  0.  0.
pair_coeff  4  4 lj/cut/coul/long  0.0117 5.52
pair_coeff  1  4 lj/cut/coul/long  0.043565 4.342175
pair_coeff  2  4 lj/cut/coul/long   0 0
pair_coeff  3  4 lj/cut/coul/long  0.0443 2.808175
pair_coeff  4  5 lj/cut/coul/long  0.031668	4.46
pair_coeff  3  5 lj/cut/coul/long 0.120356	2.926
pair_coeff  2  5 lj/cut/coul/long  0.  0.
pair_coeff  1  5 lj/cut/coul/long  0.118307	3.282175
pair_coeff 1  6 lj/cut/coul/long  0.118307 3.282175
pair_coeff 2  6 lj/cut/coul/long  0. 0.
pair_coeff 3  6  lj/cut/coul/long  0.120356  2.926
pair_coeff 4  6 lj/cut/coul/long  0.031668 4.46
pair_coeff  5  6  lj/cut/coul/long  0 0

kspace_style pppm/tip4p 1.0e-5

#COMPUTATIONAL SETTINGS

neighbor	2.0 bin
neigh_modify	delay 5

#SYSTEM ENERGY MINIMIZATION

velocity saltandwater create 300.0 2928457 rot yes dist gaussian

minimize 1.0e-4 1.0e-6 10000 10000


thermo_style    custom step temp press vol etotal #v_press0 v_press1 v_press2 v_press3 v_press4 v_press5 v_press6 v_press7
thermo          50 #output every 50 time steps the thermodynamic data

#EQUILIBRATION OF FLUIDS

fix carbonfreeze carbon setforce 0.0 0.0 0.0
fix 1 water shake 1e-6 200 0 b 1 a 1
fix 2 all npt temp 300.0 300.0 100.0 iso 1.0 1.0 1000.0


#dump		vmd all xyz 100 saltwater.*.xyz
#dump_modify	vmd pad 3 element O H Na Cl C C


timestep 1
run 100000

write_restart restart.nptequil

unfix 2
fix 2_nvt all nvt temp 300.0 300.0 100.0

timestep 1
run 100000

write_restart restart.nvtequil

unfix carbonfreeze
unfix 1
unfix 2_nvt

#Compute number of water and salt molecules in feed and permeate region
variable num_feed_waters equal "count(watermols,feed)"
variable num_feed_na equal "count(Na,feed)"
variable num_feed_cl equal "count(Cl,feed)"
variable num_perm_waters equal "count(watermols,permeate)" variable num_perm_na equal "count(Na,permeate)"
variable num_perm_cl equal "count(Cl,permeate)"
variable num_mem_waters equal "count(watermols,membrane)"
variable num_mem_na equal "count(Na,membrane)"
variable num_mem_cl equal "count(Cl,membrane)"

thermo          50
thermo_style    custom step temp press vol etotal enthalpy pe ke v_num_feed_waters v_num_feed_na v_num_feed_cl v_num_perm_waters v_num_perm_na v_num_perm_cl v_num_mem_waters v_num_mem_na v_num_mem_cl

fix membranefix membrane setforce 0. 0. 0.
fix pistonfreeze1 pistons setforce NULL 0. 0.
fix pistonLpush pistonL aveforce 0.5 NULL NULL
fix pistonRpush pistonR aveforce -0.5 NULL NULL
fix 5 water shake 1e-6 200 0 b 1 a 1
fix 6 all nvt temp 300.0 300.0 100.0

timestep 1
run 100000

write_restart restart.compress

unfix membranefix
unfix pistonfreeze1
unfix pistonLpush
unfix pistonRpush
unfix 5
unfix 6
fix membranefix1 membrane setforce 0. 0. 0.
fix pistonfreeze2 pistons setforce NULL 0. 0.
fix pistonLpush1 pistonL aveforce 0.6 NULL NULL
fix pistonRpush1 pistonR aveforce -0.5 NULL NULL
fix 7 water shake 1e-6 200 0 b 1 a 1
fix 8 all nvt temp 300.0 300.0 100.0


timestep 1
run 100000

write_restart restart.*.system

timestep 1
run 100000

write_restart restart.*.system

timestep 1
run 100000

write_restart restart.*.system

timestep 1
run 100000

write_restart restart.*.system
